*Heading
** Job name: test_05_aba Model name: Model-1
** Generated by: Abaqus/CAE 6.13-3
*Preprint, echo=NO, model=NO, history=NO, contact=NO
**
** PARTS
**
*Part, name=MY_PART
*Node
      1,           0.,           5.
      2,           0.,           0.
      3,           2.,           5.
      4,           2.,           0.
      5,           4.,           5.
      6,           4.,           0.
      7,           0.,          2.5
      8,           1.,           0.
      9,           2.,          2.5
     10,           1.,           5.
     11,           3.,           0.
     12,           4.,          2.5
     13,           3.,           5.
*Element, type=CGAX8
1,  1,  2,  4,  3,  7,  8,  9, 10
2,  3,  4,  6,  5,  9, 11, 12, 13
*Nset, nset=_PickedSet2, internal, generate
  1,  13,   1
*Elset, elset=_PickedSet2, internal
 1, 2
*Nset, nset=BOT_SET
  2,  4,  6,  8, 11
*Elset, elset=BOT_SET
 1, 2
*Nset, nset=TOP_SET
  1,  3,  5, 10, 13
*Elset, elset=TOP_SET
 1, 2
*Nset, nset=INS_SET
 1, 2, 7
*Elset, elset=INS_SET
 1,
*Nset, nset=OUT_SET
  5,  6, 12
*Elset, elset=OUT_SET
 2,
** Section: Section-1
*Solid Section, elset=_PickedSet2, material=MY_MATERIAL
,
*End Part
**
**
** ASSEMBLY
**
*Assembly, name=Assembly
**
*Instance, name=MY_INSTANCE, part=MY_PART
*End Instance
**
*End Assembly
*Amplitude, name=AMP1, time=TOTAL TIME, smooth=0.
             0.,              0., 0.002002002002002, 0.00800800800800801, 0.004004004004004, 0.016016016016016, 0.00600600600600601, 0.024024024024024
0.00800800800800801, 0.032032032032032, 0.01001001001001, 0.04004004004004, 0.012012012012012, 0.048048048048048, 0.014014014014014, 0.0560560560560561
0.016016016016016, 0.0640640640640641, 0.018018018018018, 0.0720720720720721, 0.02002002002002, 0.0800800800800801, 0.022022022022022, 0.0880880880880881
0.024024024024024, 0.0960960960960961, 0.026026026026026, 0.104104104104104, 0.028028028028028, 0.112112112112112, 0.03003003003003, 0.12012012012012
0.032032032032032, 0.128128128128128, 0.034034034034034, 0.136136136136136, 0.036036036036036, 0.144144144144144, 0.038038038038038, 0.152152152152152
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1.99399399399399, -0.0240240240240244,  1.995995995996, -0.0160160160160157,  1.997997997998, -0.00800800800800783,              2.,              0.
*Amplitude, name=AMP2, time=TOTAL TIME, smooth=0.
             0.,              0., 0.002002002002002, 0.0251552453893758, 0.004004004004004, 0.0502945703633662, 0.00600600600600601, 0.0754020645824016
0.00800800800800801, 0.100461837852168, 0.01001001001001, 0.125458030180296, 0.012012012012012, 0.150374821813937, 0.014014014014014, 0.175196443251869
0.016016016016016, 0.199907185224805, 0.018018018018018, 0.224491408637573, 0.02002002002002, 0.248933554466892, 0.022022022022022, 0.273218153608466
0.024024024024024, 0.297329836667172, 0.026026026026026, 0.321253343684144, 0.028028028028028, 0.34497353379459, 0.03003003003003, 0.36847539481025
0.032032032032032, 0.391744052720397, 0.034034034034034, 0.414764781105407, 0.036036036036036, 0.437523010456904, 0.038038038038038, 0.460004337398611
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1.99399399399399, -0.0754020645824039,  1.995995995996, -0.0502945703633669,  1.997997997998, -0.0251552453893749,              2.,  -9.79717439317883e-16
*Amplitude, name=AMP3, time=TOTAL TIME, smooth=0.
             0.,              0., 0.002002002002002, 0.016016016016016, 0.004004004004004, 0.032032032032032, 0.00600600600600601, 0.048048048048048
0.00800800800800801, 0.0640640640640641, 0.01001001001001, 0.0800800800800801, 0.012012012012012, 0.0960960960960961, 0.014014014014014, 0.112112112112112
0.016016016016016, 0.128128128128128, 0.018018018018018, 0.144144144144144, 0.02002002002002, 0.16016016016016, 0.022022022022022, 0.176176176176176
0.024024024024024, 0.192192192192192, 0.026026026026026, 0.208208208208208, 0.028028028028028, 0.224224224224224, 0.03003003003003, 0.24024024024024
0.032032032032032, 0.256256256256256, 0.034034034034034, 0.272272272272272, 0.036036036036036, 0.288288288288288, 0.038038038038038, 0.304304304304304
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1.99399399399399, -0.0480480480480487,  1.995995995996, -0.0320320320320313,  1.997997997998, -0.0160160160160157,              2.,              0.
*Amplitude, name=AMP4, time=TOTAL TIME, smooth=0.
             0.,              0., 0.002002002002002, 0.0125786178387411, 0.004004004004004, 0.0251552453893758, 0.00600600600600601, 0.0377278926787172
0.00800800800800801, 0.0502945703633662, 0.01001001001001, 0.0628532900444819, 0.012012012012012, 0.0754020645824016, 0.014014014014014, 0.0879389084110613
0.016016016016016, 0.100461837852168, 0.018018018018018, 0.112968871429073, 0.02002002002002, 0.125458030180296, 0.022022022022022, 0.137927337972654
0.024024024024024, 0.150374821813937, 0.026026026026026, 0.162798512165094, 0.028028028028028, 0.175196443251869, 0.03003003003003, 0.187566653375837
0.032032032032032, 0.199907185224805, 0.034034034034034, 0.212216086182508, 0.036036036036036, 0.224491408637573, 0.038038038038038, 0.23673121029168
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1.99399399399399, -0.0377278926787183,  1.995995995996, -0.0251552453893762,  1.997997997998, -0.0125786178387406,              2.,  -4.89858719658941e-16
**
** MATERIALS
**
*Material, name=MY_MATERIAL
*Depvar
     19,
*User Material, constants=9
80000.,   175.,   400., 10000., 0.0025,     1.,  5000.,  0.002
     1.,
**
** BOUNDARY CONDITIONS
**
** Name: FIXED_BC Type: Displacement/Rotation
*Boundary
MY_INSTANCE.BOT_SET, 2, 2
MY_INSTANCE.BOT_SET, 5, 5
** ----------------------------------------------------------------
**
** STEP: STEP1
**
*Step, name=STEP1, nlgeom=YES, inc=64
*Static, direct
0.002, 0.125,
**
** BOUNDARY CONDITIONS
**
** Name: AXIAL_DISP Type: Displacement/Rotation
*Boundary, amplitude=AMP1
MY_INSTANCE.TOP_SET, 2, 2, 0.2
** Name: INSIDE Type: Displacement/Rotation
*Boundary, amplitude=AMP3
MY_INSTANCE.INS_SET, 1, 1
** Name: OUTSIDE Type: Displacement/Rotation
*Boundary, amplitude=AMP4
MY_INSTANCE.OUT_SET, 1, 1, 0.08
** Name: ROTATION Type: Displacement/Rotation
*Boundary, amplitude=AMP2
MY_INSTANCE.TOP_SET, 5, 5, 0.05
**
** OUTPUT REQUESTS
**
*Restart, write, frequency=0
**
** FIELD OUTPUT: DefaultFieldOutput, F-Output-1
**
*Output, field, variable=PRESELECT
**
** HISTORY OUTPUT: INSIDE_OUTPUT
**
*Output, history
*Node Output, nset=MY_INSTANCE.INS_SET
RF1, U1
**
** HISTORY OUTPUT: OUTSIDE_OUTPUT
**
*Node Output, nset=MY_INSTANCE.OUT_SET
RF1, U1
**
** HISTORY OUTPUT: AXIAL_OUTPUT
**
*Node Output, nset=MY_INSTANCE.TOP_SET
RF2, RM2, U2, UR2
**
** HISTORY OUTPUT: RADIAL_OUTPUT
**
*Node Output, nset=MY_INSTANCE.TOP_SET
U1,
**
** HISTORY OUTPUT: H-Output-1
**
*Output, history, variable=PRESELECT
*End Step
** ----------------------------------------------------------------
**
** STEP: STEP2
**
*Step, name=STEP2, nlgeom=YES, inc=127
*Static, direct
0.002, 0.25,
**
** OUTPUT REQUESTS
**
*Restart, write, frequency=0
**
** FIELD OUTPUT: DefaultFieldOutput, F-Output-1
**
*Output, field, variable=PRESELECT
**
** HISTORY OUTPUT: INSIDE_OUTPUT
**
*Output, history
*Node Output, nset=MY_INSTANCE.INS_SET
RF1, U1
**
** HISTORY OUTPUT: OUTSIDE_OUTPUT
**
*Node Output, nset=MY_INSTANCE.OUT_SET
RF1, U1
**
** HISTORY OUTPUT: AXIAL_OUTPUT
**
*Node Output, nset=MY_INSTANCE.TOP_SET
RF2, RM2, U2, UR2
**
** HISTORY OUTPUT: RADIAL_OUTPUT
**
*Node Output, nset=MY_INSTANCE.TOP_SET
U1,
**
** HISTORY OUTPUT: H-Output-1
**
*Output, history, variable=PRESELECT
*End Step
** ----------------------------------------------------------------
**
** STEP: STEP3
**
*Step, name=STEP3, nlgeom=YES, inc=127
*Static, direct
0.002, 0.25,
**
** OUTPUT REQUESTS
**
*Restart, write, frequency=0
**
** FIELD OUTPUT: DefaultFieldOutput, F-Output-1
**
*Output, field, variable=PRESELECT
**
** HISTORY OUTPUT: INSIDE_OUTPUT
**
*Output, history
*Node Output, nset=MY_INSTANCE.INS_SET
RF1, U1
**
** HISTORY OUTPUT: OUTSIDE_OUTPUT
**
*Node Output, nset=MY_INSTANCE.OUT_SET
RF1, U1
**
** HISTORY OUTPUT: AXIAL_OUTPUT
**
*Node Output, nset=MY_INSTANCE.TOP_SET
RF2, RM2, U2, UR2
**
** HISTORY OUTPUT: RADIAL_OUTPUT
**
*Node Output, nset=MY_INSTANCE.TOP_SET
U1,
**
** HISTORY OUTPUT: H-Output-1
**
*Output, history, variable=PRESELECT
*End Step
** ----------------------------------------------------------------
**
** STEP: STEP4
**
*Step, name=STEP4, nlgeom=YES, inc=127
*Static, direct
0.002, 0.25,
**
** OUTPUT REQUESTS
**
*Restart, write, frequency=0
**
** FIELD OUTPUT: DefaultFieldOutput, F-Output-1
**
*Output, field, variable=PRESELECT
**
** HISTORY OUTPUT: INSIDE_OUTPUT
**
*Output, history
*Node Output, nset=MY_INSTANCE.INS_SET
RF1, U1
**
** HISTORY OUTPUT: OUTSIDE_OUTPUT
**
*Node Output, nset=MY_INSTANCE.OUT_SET
RF1, U1
**
** HISTORY OUTPUT: AXIAL_OUTPUT
**
*Node Output, nset=MY_INSTANCE.TOP_SET
RF2, RM2, U2, UR2
**
** HISTORY OUTPUT: RADIAL_OUTPUT
**
*Node Output, nset=MY_INSTANCE.TOP_SET
U1,
**
** HISTORY OUTPUT: H-Output-1
**
*Output, history, variable=PRESELECT
*End Step
** ----------------------------------------------------------------
**
** STEP: STEP5
**
*Step, name=STEP5, nlgeom=YES, inc=127
*Static, direct
0.002, 0.25,
**
** OUTPUT REQUESTS
**
*Restart, write, frequency=0
**
** FIELD OUTPUT: DefaultFieldOutput, F-Output-1
**
*Output, field, variable=PRESELECT
**
** HISTORY OUTPUT: INSIDE_OUTPUT
**
*Output, history
*Node Output, nset=MY_INSTANCE.INS_SET
RF1, U1
**
** HISTORY OUTPUT: OUTSIDE_OUTPUT
**
*Node Output, nset=MY_INSTANCE.OUT_SET
RF1, U1
**
** HISTORY OUTPUT: AXIAL_OUTPUT
**
*Node Output, nset=MY_INSTANCE.TOP_SET
RF2, RM2, U2, UR2
**
** HISTORY OUTPUT: RADIAL_OUTPUT
**
*Node Output, nset=MY_INSTANCE.TOP_SET
U1,
**
** HISTORY OUTPUT: H-Output-1
**
*Output, history, variable=PRESELECT
*End Step
** ----------------------------------------------------------------
**
** STEP: STEP6
**
*Step, name=STEP6, nlgeom=YES, inc=127
*Static, direct
0.002, 0.25,
**
** OUTPUT REQUESTS
**
*Restart, write, frequency=0
**
** FIELD OUTPUT: DefaultFieldOutput, F-Output-1
**
*Output, field, variable=PRESELECT
**
** HISTORY OUTPUT: INSIDE_OUTPUT
**
*Output, history
*Node Output, nset=MY_INSTANCE.INS_SET
RF1, U1
**
** HISTORY OUTPUT: OUTSIDE_OUTPUT
**
*Node Output, nset=MY_INSTANCE.OUT_SET
RF1, U1
**
** HISTORY OUTPUT: AXIAL_OUTPUT
**
*Node Output, nset=MY_INSTANCE.TOP_SET
RF2, RM2, U2, UR2
**
** HISTORY OUTPUT: RADIAL_OUTPUT
**
*Node Output, nset=MY_INSTANCE.TOP_SET
U1,
**
** HISTORY OUTPUT: H-Output-1
**
*Output, history, variable=PRESELECT
*End Step
** ----------------------------------------------------------------
**
** STEP: STEP7
**
*Step, name=STEP7, nlgeom=YES, inc=127
*Static, direct
0.002, 0.25,
**
** OUTPUT REQUESTS
**
*Restart, write, frequency=0
**
** FIELD OUTPUT: DefaultFieldOutput, F-Output-1
**
*Output, field, variable=PRESELECT
**
** HISTORY OUTPUT: INSIDE_OUTPUT
**
*Output, history
*Node Output, nset=MY_INSTANCE.INS_SET
RF1, U1
**
** HISTORY OUTPUT: OUTSIDE_OUTPUT
**
*Node Output, nset=MY_INSTANCE.OUT_SET
RF1, U1
**
** HISTORY OUTPUT: AXIAL_OUTPUT
**
*Node Output, nset=MY_INSTANCE.TOP_SET
RF2, RM2, U2, UR2
**
** HISTORY OUTPUT: RADIAL_OUTPUT
**
*Node Output, nset=MY_INSTANCE.TOP_SET
U1,
**
** HISTORY OUTPUT: H-Output-1
**
*Output, history, variable=PRESELECT
*End Step
** ----------------------------------------------------------------
**
** STEP: STEP8
**
*Step, name=STEP8, nlgeom=YES, inc=127
*Static, direct
0.002, 0.25,
**
** OUTPUT REQUESTS
**
*Restart, write, frequency=0
**
** FIELD OUTPUT: DefaultFieldOutput, F-Output-1
**
*Output, field, variable=PRESELECT
**
** HISTORY OUTPUT: INSIDE_OUTPUT
**
*Output, history
*Node Output, nset=MY_INSTANCE.INS_SET
RF1, U1
**
** HISTORY OUTPUT: OUTSIDE_OUTPUT
**
*Node Output, nset=MY_INSTANCE.OUT_SET
RF1, U1
**
** HISTORY OUTPUT: AXIAL_OUTPUT
**
*Node Output, nset=MY_INSTANCE.TOP_SET
RF2, RM2, U2, UR2
**
** HISTORY OUTPUT: RADIAL_OUTPUT
**
*Node Output, nset=MY_INSTANCE.TOP_SET
U1,
**
** HISTORY OUTPUT: H-Output-1
**
*Output, history, variable=PRESELECT
*End Step
** ----------------------------------------------------------------
**
** STEP: STEP9
**
*Step, name=STEP9, nlgeom=YES, inc=64
*Static, direct
0.002, 0.125,
**
** OUTPUT REQUESTS
**
*Restart, write, frequency=0
**
** FIELD OUTPUT: DefaultFieldOutput, F-Output-1
**
*Output, field, variable=PRESELECT
**
** HISTORY OUTPUT: INSIDE_OUTPUT
**
*Output, history
*Node Output, nset=MY_INSTANCE.INS_SET
RF1, U1
**
** HISTORY OUTPUT: OUTSIDE_OUTPUT
**
*Node Output, nset=MY_INSTANCE.OUT_SET
RF1, U1
**
** HISTORY OUTPUT: AXIAL_OUTPUT
**
*Node Output, nset=MY_INSTANCE.TOP_SET
RF2, RM2, U2, UR2
**
** HISTORY OUTPUT: RADIAL_OUTPUT
**
*Node Output, nset=MY_INSTANCE.TOP_SET
U1,
**
** HISTORY OUTPUT: H-Output-1
**
*Output, history, variable=PRESELECT
*End Step
