*Heading
** Job name: test_16_aba Model name: Model-1
** Generated by: Abaqus/CAE 6.13-3
*Preprint, echo=NO, model=NO, history=NO, contact=NO
**
** PARTS
**
*Part, name=CUBE
*Node
      1,           1.,           1.,           1.
      2,           1.,           0.,           1.
      3,           1.,           1.,           0.
      4,           1.,           0.,           0.
      5,           0.,           1.,           1.
      6,           0.,           0.,           1.
      7,           0.,           1.,           0.
      8,           0.,           0.,           0.
*Element, type=C3D8
1, 5, 6, 8, 7, 1, 2, 4, 3
*Nset, nset=_PickedSet2, internal, generate
 1,  8,  1
*Elset, elset=_PickedSet2, internal
 1,
*Nset, nset=BOT_SET
 3, 4, 7, 8
*Elset, elset=BOT_SET
 1,
*Nset, nset=TOP_SET
 1, 2, 5, 6
*Elset, elset=TOP_SET
 1,
*Nset, nset=XAX_SET
 4, 8
*Elset, elset=XAX_SET
 1,
*Nset, nset=YAX_SET
 7, 8
*Elset, elset=YAX_SET
 1,
*Nset, nset=ZAX_SET
 6, 8
*Elset, elset=ZAX_SET
 1,
*Nset, nset=ORIGIN
 8,
*Nset, nset=fx0
 7,
*Nset, nset=ey0
 4,
*Nset, nset=ALL, generate
 1,  8,  1
*Nset, nset=F11_PT
 3, 4
*Nset, nset=F22_PT
 3, 7
*Nset, nset=F33_PT
 1, 2, 5, 6
*Nset, nset=F13_PT
 5, 6
*Nset, nset=F23_PT
 2, 6
*Nset, nset=F11+F13_PT
 1, 2
*Nset, nset=F22+F23_PT
 1, 5
*Nset, nset=BOTZ
 3, 4, 7
*Nset, nset=P11_PT, generate
 1,  4,  1
*Nset, nset=P22_PT, generate
 1,  7,  2
*Nset, nset=P33_PT
 1, 2, 5, 6
** Section: Section-1
*Solid Section, elset=_PickedSet2, material=MY_MATERIAL
,
*End Part
**
**
** ASSEMBLY
**
*Assembly, name=Assembly
**
*Instance, name=MY_INSTANCE, part=CUBE
*End Instance
**
*End Assembly
**
** MATERIALS
**
*Material, name=MY_MATERIAL
*Depvar
     19,
*User Material, constants=9
80000.,   175.,   400., 10000., 0.0025,     1.,  5000.,  0.002
     1.,
**
** BOUNDARY CONDITIONS
**
** Name: BOTZ Type: Displacement/Rotation
*Boundary
MY_INSTANCE.BOTZ, 3, 3
** Name: ORIGIN Type: Displacement/Rotation
*Boundary
MY_INSTANCE.ORIGIN, 1, 1
MY_INSTANCE.ORIGIN, 2, 2
MY_INSTANCE.ORIGIN, 3, 3
** Name: ey0 Type: Displacement/Rotation
*Boundary
MY_INSTANCE.ey0, 2, 2
** Name: fx0 Type: Displacement/Rotation
*Boundary
MY_INSTANCE.fx0, 1, 1
** ----------------------------------------------------------------
**
** STEP: STEP-1
**
*Step, name=STEP-1, nlgeom=YES, inc=402
*Static, direct
0.005, 2.,
**
** BOUNDARY CONDITIONS
**
** Name: F11 Type: Displacement/Rotation
*Boundary
MY_INSTANCE.F11_PT, 1, 1, 0.5
** Name: F11+F13 Type: Displacement/Rotation
*Boundary
MY_INSTANCE.F11+F13_PT, 1, 1, 0.7
** Name: F13 Type: Displacement/Rotation
*Boundary
MY_INSTANCE.F13_PT, 1, 1, 0.2
** Name: F22 Type: Displacement/Rotation
*Boundary
MY_INSTANCE.F22_PT, 2, 2, -0.2
** Name: F22+F23 Type: Displacement/Rotation
*Boundary
MY_INSTANCE.F22+F23_PT, 2, 2, 1.3
** Name: F23 Type: Displacement/Rotation
*Boundary
MY_INSTANCE.F23_PT, 2, 2, 1.5
** Name: F33 Type: Displacement/Rotation
*Boundary
MY_INSTANCE.F33_PT, 3, 3, -0.125
**
** OUTPUT REQUESTS
**
*Restart, write, frequency=0
**
** FIELD OUTPUT: DefaultFieldOutput, F-Output-1
**
*Output, field, variable=PRESELECT
**
** HISTORY OUTPUT: AXIAL_OUTPUT
**
*Output, history
*Node Output, nset=MY_INSTANCE.ALL
RF1, RF2, RF3, U1, U2, U3
**
** HISTORY OUTPUT: H-Output-1
**
*Output, history, variable=PRESELECT
*End Step
